Simulations: Version=28
  DataStore
  Simulation Simulations
    Summary summaryfile
    Clock: StartDate=1969-04-01; EndDate=1972-09-01
    FileCrop FileForage
      FileName=P:\Working\DAFF_Adaptation_project\NABSA_X\YearForecast2.prn
    FileSQLiteGRASP FileGrasp: FileName=Simulations.db
    ZoneCLEM CLEM: Area=1; Slope=0; ClimateRegion=0; EcologicalIndicatorsCalculationMonth=12
      ResourcesHolder Resources
        Land
          LandType Sand_country: LandArea=30000; SoilType=1
          LandType Clay: LandArea=250; SoilType=3
        Labour: IncludeIhDocumentation=true; AllowAging=false
          LabourType Male_Adult: InitialAge=40; Gender=Male; Individuals=1
          LabourType Female_Adult: InitialAge=40; Gender=Female; Individuals=1
          LabourType Male_Teenager: InitialAge=15; Gender=Male; Individuals=1
          LabourType Female_Teenager: InitialAge=15; Gender=Female; Individuals=1
          LabourAvailabilityList
            LabourAvailabilityItem Male_Adult: Value=22
              LabourFilter: Parameter=Name; Operator=Equal; Value=Male_Adult
            LabourAvailabilityItem Male_Teenager: Value=4
              LabourFilter: Parameter=Name; Operator=Equal; Value=Male_Teenager
            LabourAvailabilityItem Female_Teenager: Value=4
              LabourFilter: Parameter=Name; Operator=Equal; Value=Female_Teenager
            LabourAvailabilityItem Male_Child: Value=4
              LabourFilter: Parameter=Name; Operator=Equal; Value=Male_Child
            LabourAvailabilityItem Female_Child: Value=4
              LabourFilter: Parameter=Name; Operator=Equal; Value=Female_Child
        GrazeFoodStore
          GrazeFoodStoreType NativePasture: NToDMDCoefficient=11.03; NToDMDIntercept=41.4; NToDMDCrudeProteinDenominator=0; GreenNitrogen=2.2; DecayNitrogen=0.35; MinimumNitrogen=0.4; DecayDMD=0.09; MinimumDMD=45; DetachRate=3; CarryoverDetachRate=12; IntakeTropicalQualityCoefficient=0.16; IntakeQualityCoefficient=1.7
        AnimalFoodStore
          AnimalFoodStoreType Maize_grain: DMD=75; Nitrogen=13.5; StartingAmount=0
          AnimalFoodStoreType Wheat_straw: DMD=45; Nitrogen=0.5; StartingAmount=0
        RuminantHerd Ruminants
          RuminantType B.indicus: Breed=B.indicus; ConceptionRateAsymptote=95; ConceptionRateCoefficient=-9.3; ConceptionRateIntercept=6.754; SRWBirth=0.08; CashmereCoefficient=0; CriticalCowWeight=0.5; AgeGrowthRateCoefficient=0.0115; SRWGrowthScalar=0.32; IntakeCoefficient=0.024; IntakeIntercept=1.7; InterParturitionIntervalCoefficient=-0.7994; InterParturitionIntervalIntercept=10.847; MinimumAge1stMating=24; MinimumSize1stMating=0.5; JuvenileMortalityCoefficient=3; JuvenileMortalityExponent=1.8; JuvenileMortalityMaximum=0.2; EGrowthEfficiencyCoefficient=0.79; EGrowthEfficiencyIntercept=0; ELactationEfficiencyCoefficient=0.35; ELactationEfficiencyIntercept=0.42; EMaintEfficiencyCoefficient=0.35; EMaintEfficiencyIntercept=0.503; Kme=1; MilkCurveNonSuckling=0.11; MilkCurveSuckling=0.6; MilkingDays=300; MilkIntakeCoefficient=0.1206; MilkIntakeIntercept=3.8146; MilkPeakYield=15; MilkOffsetDay=4; MilkPeakDay=30; MortalityBase=0.03; ProteinCoefficient=120; GestationLength=9; SRWFemale=500; TwinRate=0; WoolCoefficient=0; ProportionOfMaxWeightToSurvive=0.5; MaximumMaleMatingsPerDay=30; ProteinDegradability=0.9
            RuminantInitialCohorts InitialCohorts
              RuminantTypeCohort CalfF: Gender=Female; Age=5; Number=200; Weight=40; WeightSD=0; Suckling=true; Sire=false
              RuminantTypeCohort CalfM: Gender=Male; Age=5; Number=200; Weight=40; WeightSD=0; Suckling=true; Sire=false
              RuminantTypeCohort WeanerF: Gender=Female; Age=5; Number=500; Weight=180; WeightSD=0; Suckling=false; Sire=false
              RuminantTypeCohort WeanerM: Gender=Male; Age=5; Number=500; Weight=180; WeightSD=0; Suckling=false; Sire=false
              RuminantTypeCohort Female1_2: Gender=Female; Age=18; Number=200; Weight=270; WeightSD=0; Suckling=false; Sire=false
              RuminantTypeCohort Female2_3: Gender=Female; Age=30; Number=200; Weight=400; WeightSD=0; Suckling=false; Sire=false
              RuminantTypeCohort Female3_4: Gender=Female; Age=42; Number=200; Weight=450; WeightSD=0; Suckling=false; Sire=false
              RuminantTypeCohort Female4_5: Gender=Female; Age=54; Number=180; Weight=460; WeightSD=0; Suckling=false; Sire=false
              RuminantTypeCohort Female5_6: Gender=Female; Age=66; Number=180; Weight=470; WeightSD=0; Suckling=false; Sire=false
              RuminantTypeCohort Female6_7: Gender=Female; Age=78; Number=150; Weight=480; WeightSD=0; Suckling=false; Sire=false
              RuminantTypeCohort Female7_8: Gender=Female; Age=90; Number=150; Weight=480; WeightSD=0; Suckling=false; Sire=false
              RuminantTypeCohort Female8_9: Gender=Female; Age=102; Number=150; Weight=490; WeightSD=0; Suckling=false; Sire=false
              RuminantTypeCohort Female9_10: Gender=Female; Age=114; Number=150; Weight=500; WeightSD=0; Suckling=false; Sire=false
              RuminantTypeCohort Male1_2: Gender=Male; Age=18; Number=200; Weight=350; WeightSD=0; Suckling=false; Sire=false
              RuminantTypeCohort Male2_3: Gender=Male; Age=30; Number=200; Weight=520; WeightSD=0; Suckling=false; Sire=false
              RuminantTypeCohort Breeding_sires: Gender=Male; Age=36; Number=60; Weight=720; WeightSD=0; Suckling=false; Sire=true
            AnimalPricing Prices: PricingStyle=perKg; BreedingSirePrice=2.2
              AnimalPriceGroup CalfF: PurchaseValue=2.5; SellValue=2.5
                RuminantFilter Female: Parameter=Gender; Operator=Equal; Value=Female
                RuminantFilter WeanedNotEqualTrue: Parameter=Weaned; Operator=NotEqual; Value=True
              AnimalPriceGroup CalfM: PurchaseValue=2.5; SellValue=2.5
                RuminantFilter Male: Parameter=Gender; Operator=Equal; Value=Male
                RuminantFilter WeanedNotEqualTrue: Parameter=Weaned; Operator=NotEqual; Value=True
              AnimalPriceGroup WeanerF: PurchaseValue=2.5; SellValue=2.5
                RuminantFilter Female: Parameter=Gender; Operator=Equal; Value=Female
                RuminantFilter AgeLessThan11: Parameter=Age; Operator=LessThan; Value=11
              AnimalPriceGroup WeanerM: PurchaseValue=2.5; SellValue=2.5
                RuminantFilter Male: Parameter=Gender; Operator=Equal; Value=Male
                RuminantFilter AgeLessThan11: Parameter=Age; Operator=LessThan; Value=11
              AnimalPriceGroup Female1_2: PurchaseValue=2.4; SellValue=2.4
                RuminantFilter Female: Parameter=Gender; Operator=Equal; Value=Female
                RuminantFilter AgeLessThan24: Parameter=Age; Operator=LessThan; Value=24
              AnimalPriceGroup Female2_3: PurchaseValue=2.3; SellValue=2.3
                RuminantFilter Female: Parameter=Gender; Operator=Equal; Value=Female
                RuminantFilter AgeLessThan36: Parameter=Age; Operator=LessThan; Value=36
              AnimalPriceGroup Female3_4: PurchaseValue=2.2; SellValue=2.2
                RuminantFilter Female: Parameter=Gender; Operator=Equal; Value=Female
                RuminantFilter AgeLessThan48: Parameter=Age; Operator=LessThan; Value=48
              AnimalPriceGroup Female4_5: PurchaseValue=2.1; SellValue=2.1
                RuminantFilter Female: Parameter=Gender; Operator=Equal; Value=Female
                RuminantFilter AgeLessThan60: Parameter=Age; Operator=LessThan; Value=60
              AnimalPriceGroup Female5_6: PurchaseValue=2.0; SellValue=2.0
                RuminantFilter Female: Parameter=Gender; Operator=Equal; Value=Female
                RuminantFilter AgeLessThan72: Parameter=Age; Operator=LessThan; Value=72
              AnimalPriceGroup Female6_7: PurchaseValue=1.8; SellValue=1.8
                RuminantFilter Female: Parameter=Gender; Operator=Equal; Value=Female
                RuminantFilter AgeLessThan84: Parameter=Age; Operator=LessThan; Value=84
              AnimalPriceGroup Female7_8: PurchaseValue=1.8; SellValue=1.8
                RuminantFilter Female: Parameter=Gender; Operator=Equal; Value=Female
                RuminantFilter AgeLessThan96: Parameter=Age; Operator=LessThan; Value=96
              AnimalPriceGroup Female8_9: PurchaseValue=1.8; SellValue=1.8
                RuminantFilter Female: Parameter=Gender; Operator=Equal; Value=Female
                RuminantFilter AgeLessThan108: Parameter=Age; Operator=LessThan; Value=108
              AnimalPriceGroup Female9_10: PurchaseValue=1.8; SellValue=1.8
                RuminantFilter Female: Parameter=Gender; Operator=Equal; Value=Female
                RuminantFilter AgeLessThan120: Parameter=Age; Operator=LessThan; Value=120
              AnimalPriceGroup Male1_2: PurchaseValue=2.5; SellValue=2.5
                RuminantFilter Male: Parameter=Gender; Operator=Equal; Value=Male
                RuminantFilter AgeLessThan24: Parameter=Age; Operator=LessThan; Value=24
              AnimalPriceGroup Male2_3: PurchaseValue=2.5; SellValue=2.5
                RuminantFilter Male: Parameter=Gender; Operator=Equal; Value=Male
                RuminantFilter AgeLessThan36: Parameter=Age; Operator=LessThan; Value=36
              AnimalPriceGroup Breeding_sires: PurchaseValue=2.2; SellValue=2.2
                RuminantFilter Male: Parameter=Gender; Operator=Equal; Value=Male
                RuminantFilter BreedingSireEqualTrue: Parameter=BreedingSire; Operator=Equal; Value=True
        Finance Finances
          FinanceType Bank: OpeningBalance=-750000; EnforceWithdrawalLimit=false; WithdrawalLimit=0; InterestRateCharged=7; InterestRatePaid=0
      ActivitiesHolder Activities
        ActivityFolder CashFlow
          ActivityFolder ExpensesMonthly
            FinanceActivityPayExpense LivingCost: OnPartialResourcesAvailableAction=ReportErrorAndStop; Amount=3000; AccountName=Finances.Bank; IsOverhead=false
          ActivityFolder ExpensesAnnual
            FinanceActivityPayExpense Farmmaint: OnPartialResourcesAvailableAction=ReportErrorAndStop; Amount=60000; AccountName=Finances.Bank; IsOverhead=false
            FinanceActivityPayExpense Fuel: OnPartialResourcesAvailableAction=ReportErrorAndStop; Amount=40000; AccountName=Finances.Bank; IsOverhead=false
            FinanceActivityPayExpense Pests: OnPartialResourcesAvailableAction=ReportErrorAndStop; Amount=5000; AccountName=Finances.Bank; IsOverhead=false
            FinanceActivityPayExpense Contractors: OnPartialResourcesAvailableAction=ReportErrorAndStop; Amount=50000; AccountName=Finances.Bank; IsOverhead=false
            FinanceActivityPayExpense Admin: OnPartialResourcesAvailableAction=ReportErrorAndStop; Amount=20000; AccountName=Finances.Bank; IsOverhead=false
            FinanceActivityPayExpense Rates: OnPartialResourcesAvailableAction=ReportErrorAndStop; Amount=15000; AccountName=Finances.Bank; IsOverhead=false
            FinanceActivityPayExpense Insurance: OnPartialResourcesAvailableAction=ReportErrorAndStop; Amount=20000; AccountName=Finances.Bank; IsOverhead=false
            FinanceActivityPayExpense Electricity: OnPartialResourcesAvailableAction=ReportErrorAndStop; Amount=8000; AccountName=Finances.Bank; IsOverhead=false
            FinanceActivityPayExpense Othercosts: OnPartialResourcesAvailableAction=ReportErrorAndStop; Amount=75000; AccountName=Finances.Bank; IsOverhead=false
          FinanceActivityCalculateInterest: OnPartialResourcesAvailableAction=ReportErrorAndStop
        PastureActivityManage: OnPartialResourcesAvailableAction=ReportErrorAndStop; FeedTypeName=GrazeFoodStore.NativePasture; StartingAmount=0; StartingStockingRate=0; AreaRequested=0; UseAreaAvailable=true
          Relationship:
            StartingValue  Minimum  Maximum  XValues           YValues
            3              1        8        [0, 20, 30, 100]  [-0.625, -0.125, 0, 0.75]
            5              5        8        [0, 20, 30, 100]  [-0.95, -0.15, 0, 1.05]
        ActivityFolder Manage herd: OnPartialResourcesAvailableAction=ReportErrorAndStop
          ActivityFolder Manage B indicus
            RuminantActivityWean Wean: OnPartialResourcesAvailableAction=ReportErrorAndStop; WeaningAge=9; WeaningWeight=250; GrazeFoodStoreName=NativePasture
            RuminantActivityManage Manage numbers: OnPartialResourcesAvailableAction=ReportErrorAndStop; MaximumBreedersKept=1650; MinimumBreedersKept=0; MaximumBreederAge=120; MaximumBreedersPerPurchase=1; MaximumSiresKept=0; MaximumBullAge=96; AllowSireReplacement=false; MaximumSiresPerPurchase=0; MaleSellingAge=42; MaleSellingWeight=580; GrazeFoodStoreName=GrazeFoodStore.NativePasture; MinimumPastureBeforeRestock=0; SellFemalesLikeMales=false; ContinuousMaleSales=false
              ActivityTimerInterval ManageHerdTimer: MonthDue=12
            RuminantActivitySellDryBreeders: OnPartialResourcesAvailableAction=ReportErrorAndStop; MinimumConceptionBeforeSell=1; MonthsSinceBirth=24; ProportionToRemove=0.2
          ActivityFolder Cut and carry: OnPartialResourcesAvailableAction=ReportErrorAndStop
            RuminantActivityFeed Feed Maize_grain: OnPartialResourcesAvailableAction=UseResourcesAvailable; FeedTypeName=AnimalFoodStore.; ProportionTramplingWastage=0.3; FeedStyle=ProportionOfPotentialIntake
              LabourRequirement: LabourPerUnit=0.75; UnitSize=25; WholeUnitBlocks=false; UnitType=perKg; MinimumPerPerson=1; MaximumPerPerson=100; LabourShortfallAffectsActivity=false
                LabourFilterGroup Male
                  LabourFilter: Parameter=Name; Operator=Equal; Value=Male
            RuminantActivityFeed Feed Wheat_straw: same as Simulations.CLEM.Activities.Manage herd.Cut and carry.Feed Maize_grain
          RuminantActivityGrazeAll: OnPartialResourcesAvailableAction=UseResourcesAvailable; HoursGrazed=8
            LabourRequirement: LabourPerUnit=4; UnitSize=1; WholeUnitBlocks=false; UnitType=perAE; MinimumPerPerson=0; MaximumPerPerson=30; LabourShortfallAffectsActivity=false
              LabourFilterGroup Male
                LabourFilter: Parameter=Name; Operator=Equal; Value=Male
          RuminantActivityGrow Grow all ruminants: OnPartialResourcesAvailableAction=UseResourcesAvailable
          RuminantActivityBreed Breed: OnPartialResourcesAvailableAction=ReportErrorAndStop; MaximumConceptionRateUncontrolled=0.8; UseAI=true
          RuminantActivityBuySell: OnPartialResourcesAvailableAction=ReportErrorAndStop; BankAccountName=Finances.Bank
          RuminantActivityMuster: OnPartialResourcesAvailableAction=ReportErrorAndStop; ManagedPastureName=GrazeFoodStore.NativePasture; PerformAtStartOfSimulation=true; MoveSucklings=true
        SummariseRuminantHerd SummariseHerd
        ReportRuminantHerd ReportHerd
      Folder Reports
        ReportResourceLedger Land: VariableNames=Land
        ReportResourceLedger Labour: VariableNames=Labour
        ReportResourceLedger GrazeFoodStore: VariableNames=GrazeFoodStore
        ReportResourceLedger AnimalFoodStore: VariableNames=AnimalFoodStore
        ReportResourceLedger RuminantHerd: VariableNames=RuminantHerd
        ReportResourceLedger Finance: VariableNames=Finance
        ReportActivitiesPerformed
        ReportResourceShortfalls
